<?xml version="1.0"?>

<!-- Copyright (c) 2026 Josh Davidson (Octal450) -->

<fdm_config name="KDC-10-40" version="2.0" release="BETA">

	<fileheader>
		<author>Josh Davidson (Octal450)</author>
		<description>KDC-10-40 FDE with JT9D-59A Engines</description>
	</fileheader>

	<aerodynamics file="FDE/Config/dc-10-aerodynamics.xml"/>
	<external_reactions file="FDE/Config/dc-10-external-reactions"/>
	<ground_reactions file="FDE/Config/dc-10-ground-reactions"/>
	<mass_balance file="FDE/Config/dc-10f-mass-balance"/>
	<metrics file="FDE/Config/dc-10-metrics"/>

	<system file="dc-10-core"/>
	<system file="dc-10-electrical"/>
	<system file="dc-10-fire"/>
	<system file="dc-10-fuel"/>
	<system file="dc-10-hydraulics"/>
	<system file="dc-10-fcc"/>
	<system file="dc-10-fcs"/>
	<system file="dc-10-spoilers"/>
	<system file="dc-10-ignition"/>
	<system file="dc-10-pw-59a-engine-thrlim"/>
	<system file="dc-10-apu"/>
	<system file="dc-10-tanker"/>
	<system file="dc-10-misc"/>
	<system file="dc-10-performance"/>
	<system file="dc-10-cockpit"/>
	<system file="dc-10-instrumentation"/>

	<propulsion>
		<engine file="jt9d-59a_1">
			<feed>7</feed>
			<thruster file="direct">
				<location unit="M">
					<x>-5.29297</x>
					<y>-4.14094</y>
					<z>3.47943</z>
				</location>
				<orient unit="DEG">
					<roll>0</roll>
					<pitch>2</pitch>
					<yaw>2</yaw>
				</orient>
			</thruster>
		</engine>

		<engine file="jt9d-59a_2">
			<feed>8</feed>
			<thruster file="direct">
				<location unit="M">
					<x>20.764</x>
					<y>0 </y>
					<z>10.6498</z>
				</location>
				<orient unit="DEG">
					<roll>0</roll>
					<pitch>0</pitch>
					<yaw>0</yaw>
				</orient>
			</thruster>
		</engine>

		<engine file="jt9d-59a_3">
			<feed>9</feed>
			<thruster file="direct">
				<location unit="M">
					<x>-5.29297</x>
					<y>4.14094</y>
					<z>3.47943</z>
				</location>
				<orient unit="DEG">
					<roll>0</roll>
					<pitch>2</pitch>
					<yaw>-2</yaw>
				</orient>
			</thruster>
		</engine>

		<engine file="tscp700-4b">
			<feed>10</feed>
			<thruster file="direct">
				<location unit="M">
					<x>20.3934</x>
					<y>0</y>
					<z>7.95507</z>
				</location>
				<orient unit="DEG">
					<roll>0</roll>
					<pitch>0</pitch>
					<yaw>0</yaw>
				</orient>
			</thruster>
		</engine>

		<!-- Fuel Tank Capacities from Type Sheet, positions fudged for CG accuracy -->
		<tank type="FUEL"> <!-- Tank 1 Outboard -->
			<location unit="M">
				<x>4.65468</x>
				<y>-17.0253</y>
				<z>5.96573</z>
			</location>
			<capacity unit="LBS">6500</capacity>
			<contents unit="LBS">6500</contents>
			<standpipe unit="LBS">31</standpipe>
			<priority>1</priority>
			<type>JET-A1</type>
			<temperature>50</temperature>
		</tank>
		<tank type="FUEL"> <!-- Tank 1 Inboard -->
			<location unit="M">
				<x>3.39431</x>
				<y>-9.78756</y>
				<z>5.55365</z>
			</location>
			<capacity unit="LBS">33703</capacity>
			<contents unit="LBS">13500</contents>
			<standpipe unit="LBS">31</standpipe>
			<priority>1</priority>
			<type>JET-A1</type>
			<temperature>50</temperature>
		</tank>
		<tank type="FUEL"> <!-- Tank 2 -->
			<location unit="M">
				<x>0.85765</x>
				<y>0</y>
				<z>5.70658</z>
			</location>
			<capacity unit="LBS">64969</capacity>
			<contents unit="LBS">20000</contents>
			<standpipe unit="LBS">43</standpipe>
			<priority>1</priority>
			<type>JET-A1</type>
			<temperature>50</temperature>
		</tank>
		<tank type="FUEL"> <!-- Tank 3 Inboard -->
			<location unit="M">
				<x>3.39431</x>
				<y>9.78756</y>
				<z>5.55365</z>
			</location>
			<capacity unit="LBS">33703</capacity>
			<contents unit="LBS">13500</contents>
			<standpipe unit="LBS">31</standpipe>
			<priority>1</priority>
			<type>JET-A1</type>
			<temperature>50</temperature>
		</tank>
		<tank type="FUEL"> <!-- Tank 3 Outboard -->
			<location unit="M">
				<x>4.65468</x>
				<y>17.0253</y>
				<z>5.96573</z>
			</location>
			<capacity unit="LBS">6500</capacity>
			<contents unit="LBS">6500</contents>
			<standpipe unit="LBS">31</standpipe>
			<priority>1</priority>
			<type>JET-A1</type>
			<temperature>50</temperature>
		</tank>
		<tank type="FUEL"> <!-- Upper Aux Tank -->
			<location unit="M">
				<x>1.59574</x>
				<y>0</y>
				<z>5.09697</z>
			</location>
			<capacity unit="LBS">87111</capacity>
			<contents unit="LBS">0</contents>
			<standpipe unit="LBS">43</standpipe>
			<priority>1</priority>
			<type>JET-A1</type>
			<temperature>50</temperature>
		</tank>
		<tank type="FUEL"> <!-- Lower Aux Tank -->
			<location unit="M">
				<x>1.59574</x>
				<y>0</y>
				<z>4.18259</z>
			</location>
			<capacity unit="LBS">11000</capacity>
			<contents unit="LBS">0</contents>
			<standpipe unit="LBS">43</standpipe>
			<priority>1</priority>
			<type>JET-A1</type>
			<temperature>50</temperature>
		</tank>
		<tank type="FUEL"> <!-- Engine 1 Pipe -->
			<location unit="M">
				<x>2.36316</x>
				<y>0</y>
				<z>5.69282</z>
			</location>
			<capacity unit="LBS">10</capacity>
			<contents unit="LBS">0</contents>
			<priority>1</priority>
			<type>JET-A1</type>
		</tank>
		<tank type="FUEL"> <!-- Engine 2 Pipe -->
			<location unit="M">
				<x>2.36316</x>
				<y>0</y>
				<z>5.69282</z>
			</location>
			<capacity unit="LBS">10</capacity>
			<contents unit="LBS">0</contents>
			<priority>1</priority>
			<type>JET-A1</type>
		</tank>
		<tank type="FUEL"> <!-- Engine 3 Pipe -->
			<location unit="M">
				<x>2.36316</x>
				<y>0</y>
				<z>5.69282</z>
			</location>
			<capacity unit="LBS">10</capacity>
			<contents unit="LBS">0</contents>
			<priority>1</priority>
			<type>JET-A1</type>
		</tank>
		<tank type="FUEL"> <!-- APU Pipe -->
			<location unit="M">
				<x>2.36316</x>
				<y>0</y>
				<z>5.69282</z>
			</location>
			<capacity unit="LBS">5</capacity>
			<contents unit="LBS">0</contents>
			<priority>1</priority>
			<type>JET-A1</type>
		</tank>
	</propulsion>

</fdm_config>
